T(θ, d, a, α) := [
    cos(θ), -sin(θ)*cos(α), sin(θ)*sin(α), a*cos(θ);
    sin(θ), cos(θ)*cos(α), -cos(θ)*sin(α), a*sin(θ);
    0, sin(α), cos(α), d;
    0, 0, 0, 1
]
# Матрица однородного преобразования для звена 0 - 1:
T(θ_1, d_1, a_1, 0) → [
    cos(θ_1), -sin(θ_1), 0, a_1*cos(θ_1);
    sin(θ_1), cos(θ_1), 0, a_1*sin(θ_1);
    0, 0, 1, d_1;
    0, 0, 0, 1
]
# Матрица однородного преобразования для звена 1 - 2:
T(θ_2, 0, a_2, π) → [cos(θ_2), sin(θ_2), 0, a_2*cos(θ_2); sin(θ_2), -cos(θ_2), 0, a_2*sin(θ_2); 0, 0, -1, 0; 0, 0, 0, 1]
# Матрица однородного преобразования для звена 2 - 3:
T(0, d_3 + L_3, 0, 0) → [1, 0, 0, 0; 0, 1, 0, 0; 0, 0, 1, L_3 + d_3; 0, 0, 0, 1]
T(θ_1, d_1, a_1, 0)*T(θ_2, 0, a_2, π)*T(0, d_3 + L_3, 0, 0) simplify → [
    cos(θ_1 + θ_2), sin(θ_1 + θ_2), 0, a_2*cos(θ_1 + θ_2) + a_1*cos(θ_1);
    sin(θ_1 + θ_2), -cos(θ_1 + θ_2), 0, a_2*sin(θ_1 + θ_2) + a_1*sin(θ_1);
    0, 0, -1, d_1 - L_3 - d_3;
    0, 0, 0, 1
]
X == a_2*cos(θ_1 + θ_2) + a_1*cos(θ_1) expand → X == a_1*cos(θ_1) + a_2*cos(θ_1)*cos(θ_2) - a_2*sin(θ_1)*sin(θ_2)
Y == a_2*sin(θ_1 + θ_2) + a_1*sin(θ_1) expand → Y == a_1*sin(θ_1) + a_2*cos(θ_1)*sin(θ_2) + a_2*cos(θ_2)*sin(θ_1)
Z == d_1 - L_3 - d_3
# Выполним замену:
X == a_1*cos(θ_1) + a_2*cos(θ_1)*cos(θ_2) - a_2*sin(θ_1)*sin(θ_2) substitute, cos(θ_1) == (1 - u_1^2)/(1 + u_1^2), cos(θ_2) == (1 - u_1^2)/(1 + u_1^2), sin(θ_1) == 2*u_1/(1 + u_1^2), sin(θ_2) == 2*u_2/(1 + u_2^2) → X == (a_1 + a_2 + a_1*u_2^2 - 2*a_2*u_1^2 - a_1*u_1^4 + a_2*u_2^2 + a_2*u_1^4 - 2*a_2*u_1^2*u_2^2 - a_1*u_1^4*u_2^2 + a_2*u_1^4*u_2^2 - 4*a_2*u_1*u_2 - 4*a_2*u_1^3*u_2)/((u_1^2 + 1)^2*(u_2^2 + 1))
X == (a_1 + a_2 + a_1*u_2^2 - 2*a_2*u_1^2 - a_1*u_1^4 + a_2*u_2^2 + a_2*u_1^4 - 2*a_2*u_1^2*u_2^2 - a_1*u_1^4*u_2^2 + a_2*u_1^4*u_2^2 - 4*a_2*u_1*u_2 - 4*a_2*u_1^3*u_2)/((u_1^2 + 1)^2*(u_2^2 + 1))
Y == a_1*sin(θ_1) + a_2*cos(θ_1)*sin(θ_2) + a_2*cos(θ_2)*sin(θ_1) substitute, cos(θ_1) == (1 - u_1^2)/(1 + u_1^2), cos(θ_2) == (1 - u_1^2)/(1 + u_1^2), sin(θ_1) == 2*u_1/(1 + u_1^2), sin(θ_2) == 2*u_2/(1 + u_2^2) → Y == 2*(a_1*u_1^3 - a_2*u_1^3 + a_1*u_1 + a_2*u_1 + a_2*u_2 + a_1*u_1^3*u_2^2 - a_2*u_1^3*u_2^2 + a_1*u_1*u_2^2 + a_2*u_1*u_2^2 - a_2*u_1^4*u_2)/((u_1^2 + 1)^2*(u_2^2 + 1))
Y == 2*(a_1*u_1^3 - a_2*u_1^3 + a_1*u_1 + a_2*u_1 + a_2*u_2 + a_1*u_1^3*u_2^2 - a_2*u_1^3*u_2^2 + a_1*u_1*u_2^2 + a_2*u_1*u_2^2 - a_2*u_1^4*u_2)/((u_1^2 + 1)^2*(u_2^2 + 1))
Z == d_1 - L_3 - d_3
Given
a_1 := 3.23
a_2 := 0.67
d_1 := 0.8
d_3 := 0.4
X == (a_1 + a_2 + a_1*u_2^2 - 2*a_2*u_1^2 - a_1*u_1^4 + a_2*u_2^2 + a_2*u_1^4 - 2*a_2*u_1^2*u_2^2 - a_1*u_1^4*u_2^2 + a_2*u_1^4*u_2^2 - 4*a_2*u_1*u_2 - 4*a_2*u_1^3*u_2)/((u_1^2 + 1)^2*(u_2^2 + 1))
Y == 2*(a_1*u_1^3 - a_2*u_1^3 + a_1*u_1 + a_2*u_1 + a_2*u_2 + a_1*u_1^3*u_2^2 - a_2*u_1^3*u_2^2 + a_1*u_1*u_2^2 + a_2*u_1*u_2^2 - a_2*u_1^4*u_2)/((u_1^2 + 1)^2*(u_2^2 + 1))
Z == d_1 - L_3 - d_3
Find(u_1, u_2)  # error: Решение не было найдено.
