T(θ, d, a, α) := [
    cos(θ), -sin(θ)*cos(α), sin(θ)*sin(α), a*cos(θ);
    sin(θ), cos(θ)*cos(α), -cos(θ)*sin(α), a*sin(θ);
    0, sin(α), cos(α), d;
    0, 0, 0, 1
]
# Матрица однородного преобразования для звена 0 - 1:
T(θ_1, d_1, a_1, 0) → [
    cos(θ_1), -sin(θ_1), 0, a_1*cos(θ_1);
    sin(θ_1), cos(θ_1), 0, a_1*sin(θ_1);
    0, 0, 1, d_1;
    0, 0, 0, 1
]
# Матрица однородного преобразования для звена 1 - 2:
T(θ_2, 0, a_2, π) → [cos(θ_2), sin(θ_2), 0, a_2*cos(θ_2); sin(θ_2), -cos(θ_2), 0, a_2*sin(θ_2); 0, 0, -1, 0; 0, 0, 0, 1]
# Матрица однородного преобразования для звена 2 - 3:
T(0, d_3 + L_3, 0, 0) → [1, 0, 0, 0; 0, 1, 0, 0; 0, 0, 1, L_3 + d_3; 0, 0, 0, 1]
T(θ_1, d_1, a_1, 0)*T(θ_2, 0, a_2, π)*T(0, d_3 + L_3, 0, 0) simplify → [
    cos(θ_1 + θ_2), sin(θ_1 + θ_2), 0, a_2*cos(θ_1 + θ_2) + a_1*cos(θ_1);
    sin(θ_1 + θ_2), -cos(θ_1 + θ_2), 0, a_2*sin(θ_1 + θ_2) + a_1*sin(θ_1);
    0, 0, -1, d_1 - L_3 - d_3;
    0, 0, 0, 1
]
X == a_2*cos(θ_1 + θ_2) + a_1*cos(θ_1)
Y == a_2*sin(θ_1 + θ_2) + a_1*sin(θ_1)
Z == d_1 - L_3 - d_3
Given
a_1 + a_2 == 3.9
a_1 + a_2*cos(130*deg) == 2.8
[a_1; a_2] := Find(a_1, a_2) → [(39.0*cos(130.0*deg) - 28.0)/(10.0*cos(130.0*deg) - 10.0); -11.0/(10.0*cos(130.0*deg) - 10.0)]
[a_1; a_2] = [3.23041; 0.669594]
0.8 - d_3 == 0.4 solve → 0.4
1.2 + 0.8*cos(45*deg) - 5.286 = -3.52031
4.2 - 3.365 = 0.835
1.6 - 5.286 = -3.686
1.5 - cos(45*deg) - 3.365 = -2.57211
7.5 + sin(45*deg) - 5.286 = 2.92111
4.2 - 3.365 = 0.835
1.3 + 7 - 0.3 - 5.286 = 2.714
7.3 - 1.4*cos(45*deg) - 3.365 = 2.94505
7.4 - 1.4*sin(45*deg) - 5.286 = 1.12405
